q[1] := 90
q[2] := 45
q[3] := 0
q[4] := 0
q[5] := 1
q[6] := 0
α[1] := 90
α[2] := 0
α[3] := 90
α[4] := -90
α[5] := 90
α[6] := 0
L_01 := 8
L_11 := 2
L_2 := 10.6
L_40 := 2.6
L_41 := 13.5
L_56 := 5
θ[1] := q[1]
θ[2] := q[2]
θ[3] := q[3]
θ[4] := q[4]
θ[5] := q[5]
θ[6] := q[6]
d[1] := L_01
d[2] := 150
d[3] := 0
d[4] := L_41
d[5] := 0
d[6] := L_56
a[1] := L_11
a[2] := L_2
a[3] := L_40
a[4] := 0
a[5] := 0
a[6] := 0
A[1] := [
    cos(θ[1]*π/180), -cos(α[1]*π/180)*sin(θ[1]*π/180), sin(α[1]*π/180)*sin(θ[1]*π/180), a[1]*cos(θ[1]*π/180);
    sin(θ[1]*π/180), cos(α[1]*π/180)*cos(θ[1]*π/180), -sin(α[1]*π/180)*cos(θ[1]*π/180), a[1]*sin(θ[1]*π/180);
    0, sin(α[1]*π/180), cos(α[1]*π/180), d[1];
    0, 0, 0, 1
] = [0, 0, 1, 0; 1, 0, 0, 2; 0, 1, 0, 8; 0, 0, 0, 1]
A[2] := [
    cos(θ[2]*π/180), -cos(α[2]*π/180)*sin(θ[2]*π/180), sin(α[2]*π/180)*sin(θ[2]*π/180), a[2]*cos(θ[2]*π/180);
    sin(θ[2]*π/180), cos(α[2]*π/180)*cos(θ[2]*π/180), -sin(α[2]*π/180)*cos(θ[2]*π/180), a[2]*sin(θ[2]*π/180);
    0, sin(α[2]*π/180), cos(α[2]*π/180), d[2];
    0, 0, 0, 1
] = [0.707107, -0.707107, 0, 7.49533; 0.707107, 0.707107, 0, 7.49533; 0, 0, 1, 150; 0, 0, 0, 1]
A[3] := [
    cos(θ[3]*π/180), -cos(α[3]*π/180)*sin(θ[3]*π/180), sin(α[3]*π/180)*sin(θ[3]*π/180), a[3]*cos(θ[3]*π/180);
    sin(θ[3]*π/180), cos(α[3]*π/180)*cos(θ[3]*π/180), -sin(α[3]*π/180)*cos(θ[3]*π/180), a[3]*sin(θ[3]*π/180);
    0, sin(α[3]*π/180), cos(α[3]*π/180), d[3];
    0, 0, 0, 1
] = [1, 0, 0, 2.6; 0, 0, -1, 0; 0, 1, 0, 0; 0, 0, 0, 1]
A[4] := [
    cos(θ[4]*π/180), -cos(α[4]*π/180)*sin(θ[4]*π/180), sin(α[4]*π/180)*sin(θ[4]*π/180), a[4]*cos(θ[4]*π/180);
    sin(θ[4]*π/180), cos(α[4]*π/180)*cos(θ[4]*π/180), -sin(α[4]*π/180)*cos(θ[4]*π/180), a[4]*sin(θ[4]*π/180);
    0, sin(α[4]*π/180), cos(α[4]*π/180), d[4];
    0, 0, 0, 1
] = [1, 0, 0, 0; 0, 0, 1, 0; 0, -1, 0, 13.5; 0, 0, 0, 1]
A[5] := [
    cos(θ[5]*π/180), -cos(α[5]*π/180)*sin(θ[5]*π/180), sin(α[5]*π/180)*sin(θ[5]*π/180), a[5]*cos(θ[5]*π/180);
    sin(θ[5]*π/180), cos(α[5]*π/180)*cos(θ[5]*π/180), -sin(α[5]*π/180)*cos(θ[5]*π/180), a[5]*sin(θ[5]*π/180);
    0, sin(α[5]*π/180), cos(α[5]*π/180), d[5];
    0, 0, 0, 1
] = [0.999848, 0, 0.0174524, 0; 0.0174524, 0, -0.999848, 0; 0, 1, 0, 0; 0, 0, 0, 1]
A[6] := [
    cos(θ[6]*π/180), -cos(α[6]*π/180)*sin(θ[6]*π/180), sin(α[6]*π/180)*sin(θ[6]*π/180), a[6]*cos(θ[6]*π/180);
    sin(θ[6]*π/180), cos(α[6]*π/180)*cos(θ[6]*π/180), -sin(α[6]*π/180)*cos(θ[6]*π/180), a[6]*sin(θ[6]*π/180);
    0, sin(α[6]*π/180), cos(α[6]*π/180), d[6];
    0, 0, 0, 1
] = [1, 0, 0, 0; 0, 1, 0, 0; 0, 0, 1, 5; 0, 0, 0, 1]
H := A[1]*A[2]*A[3]*A[4]*A[5]*A[6] = [0, 1, 0, 150; 0.694658, 0, 0.71934, 24.4765; 0.71934, 0, -0.694658, 4.31458; 0, 0, 0, 1]
R := [0; 0; 0; 1]
A[1]*A[2]*A[3]*A[4]*A[5]*A[6]*R = [150; 24.4765; 4.31458; 1]
nx := H[0, 0] = -1.51125e-18
sx := H[0, 1] = 1
ax := H[0, 2] = 1.4781e-16
px := H[0, 3] = 150
ny := H[1, 0] = 0.694658
sy := H[1, 1] = -1.05276e-16
ay := H[1, 2] = 0.71934
py := H[1, 3] = 24.4765
nz := H[2, 0] = 0.71934
sz := H[2, 1] = 1.03764e-16
az := H[2, 2] = -0.694658
pz := H[2, 3] = 4.31458
A[1]*A[2]*A[3] = [0, 1, 0, 150; 0.707107, 0, 0.707107, 11.3338; 0.707107, 0, -0.707107, 17.3338; 0, 0, 0, 1]
A[4]*A[5]*A[6] = [0.999848, 0, 0.0174524, 0.087262; 0, 1, 0, 0; -0.0174524, 0, 0.999848, 18.4992; 0, 0, 0, 1]
H := [nx, sx, ax, px; ny, sy, ay, py; nz, sz, az, pz; 0, 0, 0, 1] = [0, 1, 0, 150; 0.694658, 0, 0.71934, 24.4765; 0.71934, 0, -0.694658, 4.31458; 0, 0, 0, 1]
# inverse orientation task
ori_T := atan2(nz, -sz)*180/π
ori_A := atan2(az, -nz*cos(ori_T*π/180) + sz*sin(ori_T*π/180))*180/π
ori_O := atan2(ny*sin(ori_T*π/180) + sy*cos(ori_T*π/180), -nx*sin(ori_T*π/180) - sx*cos(ori_T*π/180))*180/π
ori_T = -8.26489e-15
ori_A = -134
ori_O = -90
ori_T*π/180 = -1.4425e-16
ori_A*π/180 = -2.33874
ori_O*π/180 = -1.5708
[
    nxp*cos(TTT) - sxp*sin(TTT), nxp*sin(TTT) + sxp*cos(TTT), axp;
    nyp*cos(TTT) - syp*sin(TTT), nyp*sin(TTT) + syp*cos(TTT), ayp;
    nzp*cos(TTT) - szp*sin(TTT), nzp*sin(TTT) + szp*cos(TTT), azp
]
[
    cos(AAA)*cos(OOO), -sin(OOO), sin(AAA)*cos(OOO);
    cos(AAA)*sin(OOO), cos(OOO), sin(AAA)*sin(OOO);
    -sin(AAA), 0, cos(AAA)
]
Ori_Matrix := [
    cos(ori_A*π/180)*cos(ori_O*π/180)*cos(ori_T*π/180) - sin(ori_O*π/180)*sin(ori_T*π/180), -sin(ori_O*π/180)*cos(ori_T*π/180) - cos(ori_A*π/180)*cos(ori_O*π/180)*sin(ori_T*π/180), sin(ori_A*π/180)*cos(ori_O*π/180);
    cos(ori_O*π/180)*sin(ori_T*π/180) + cos(ori_A*π/180)*sin(ori_O*π/180)*cos(ori_T*π/180), cos(ori_O*π/180)*cos(ori_T*π/180) - cos(ori_A*π/180)*sin(ori_O*π/180)*sin(ori_T*π/180), sin(ori_A*π/180)*sin(ori_O*π/180);
    -sin(ori_A*π/180)*cos(ori_T*π/180), sin(ori_A*π/180)*sin(ori_T*π/180), cos(ori_A*π/180)
]
Ori_Matrix = [0, 1, 0; 0.694658, 0, 0.71934; 0.71934, 0, -0.694658]
[nxp, sxp, axp; nyp, syp, ayp; nzp, szp, azp] := [nx, sx, ax; ny, sy, ay; nz, sz, az]
# direct orientation task
[nxp, sxp, axp; nyp, syp, ayp; nzp, szp, azp] = [0, 1, 0; 0.694658, 0, 0.71934; 0.71934, 0, -0.694658]
ori_T := 0
ori_A := 0
ori_O := 0
nxp := cos(ori_A*π/180)*cos(ori_O*π/180)*cos(ori_T*π/180) - sin(ori_O*π/180)*sin(ori_T*π/180)
sxp := -sin(ori_O*π/180)*cos(ori_T*π/180) - cos(ori_A*π/180)*cos(ori_O*π/180)*sin(ori_T*π/180)
axp := sin(ori_A*π/180)*cos(ori_O*π/180)
nyp := cos(ori_O*π/180)*sin(ori_T*π/180) + cos(ori_A*π/180)*sin(ori_O*π/180)*cos(ori_T*π/180)
syp := cos(ori_O*π/180)*cos(ori_T*π/180) - cos(ori_A*π/180)*sin(ori_O*π/180)*sin(ori_T*π/180)
ayp := sin(ori_A*π/180)*sin(ori_O*π/180)
nzp := -sin(ori_A*π/180)*cos(ori_T*π/180)
szp := sin(ori_A*π/180)*sin(ori_T*π/180)
azp := cos(ori_A*π/180)
[nxp, sxp, axp; nyp, syp, ayp; nzp, szp, azp] = [1, 0, 0; 0, 1, 0; 0, 0, 1]
[nxp, sxp, axp; nyp, syp, ayp; nzp, szp, azp] := [nx, sx, ax; ny, sy, ay; nz, sz, az]
[nxp, sxp, axp; nyp, syp, ayp; nzp, szp, azp] = [0, 1, 0; 0.694658, 0, 0.71934; 0.71934, 0, -0.694658]
# Preparation to inverse kinematic solution
nx := ((cos(π*(θ[2] + θ[3])/180)*cos(π*θ[1]/180)*cos(π*θ[4]/180) - sin(π*θ[1]/180)*sin(π*θ[4]/180))*cos(π*θ[5]/180) + (-sin(π*(θ[2] + θ[3])/180)*cos(π*θ[1]/180))*sin(π*θ[5]/180))*cos(π*θ[6]/180) + (-cos(π*θ[4]/180)*sin(π*θ[1]/180) - cos(π*(θ[2] + θ[3])/180)*cos(π*θ[1]/180)*sin(π*θ[4]/180))*sin(π*θ[6]/180)
ny := ((cos(π*θ[1]/180)*sin(π*θ[4]/180) + cos(π*(θ[2] + θ[3])/180)*cos(π*θ[4]/180)*sin(π*θ[1]/180))*cos(π*θ[5]/180) + (-sin(π*(θ[2] + θ[3])/180)*sin(π*θ[1]/180))*sin(π*θ[5]/180))*cos(π*θ[6]/180) + (cos(π*θ[1]/180)*cos(π*θ[4]/180) - cos(π*(θ[2] + θ[3])/180)*sin(π*θ[1]/180)*sin(π*θ[4]/180))*sin(π*θ[6]/180)
nz := ((-sin(π*(θ[2] + θ[3])/180)*cos(π*θ[4]/180))*cos(π*θ[5]/180) + (-cos(1/180*π*(θ[2] + θ[3])))*sin(π*θ[5]/180))*cos(π*θ[6]/180) + (sin(π*(θ[2] + θ[3])/180)*sin(π*θ[4]/180))*sin(π*θ[6]/180)
sx := (-cos(π*θ[4]/180)*sin(π*θ[1]/180) - cos(π*(θ[2] + θ[3])/180)*cos(π*θ[1]/180)*sin(π*θ[4]/180))*cos(π*θ[6]/180) - ((cos(π*(θ[2] + θ[3])/180)*cos(π*θ[1]/180)*cos(π*θ[4]/180) - sin(π*θ[1]/180)*sin(π*θ[4]/180))*cos(π*θ[5]/180) + (-sin(π*(θ[2] + θ[3])/180)*cos(π*θ[1]/180))*sin(π*θ[5]/180))*sin(π*θ[6]/180)
sy := (cos(π*θ[1]/180)*cos(π*θ[4]/180) - cos(π*(θ[2] + θ[3])/180)*sin(π*θ[1]/180)*sin(π*θ[4]/180))*cos(π*θ[6]/180) - ((cos(π*θ[1]/180)*sin(π*θ[4]/180) + cos(π*(θ[2] + θ[3])/180)*cos(π*θ[4]/180)*sin(π*θ[1]/180))*cos(π*θ[5]/180) + (-sin(π*(θ[2] + θ[3])/180)*sin(π*θ[1]/180))*sin(π*θ[5]/180))*sin(π*θ[6]/180)
sz := (sin(π*(θ[2] + θ[3])/180)*sin(π*θ[4]/180))*cos(π*θ[6]/180) - ((-sin(π*(θ[2] + θ[3])/180)*cos(π*θ[4]/180))*cos(π*θ[5]/180) + (-cos(1/180*π*(θ[2] + θ[3])))*sin(π*θ[5]/180))*sin(π*θ[6]/180)
ax := ((cos(π*(θ[2] + θ[3])/180)*cos(π*θ[1]/180)*cos(π*θ[4]/180) - sin(π*θ[1]/180)*sin(π*θ[4]/180))*sin(π*θ[5]/180) - (-sin(π*(θ[2] + θ[3])/180)*cos(π*θ[1]/180))*cos(π*θ[5]/180))
ay := ((cos(π*θ[1]/180)*sin(π*θ[4]/180) + cos(π*(θ[2] + θ[3])/180)*cos(π*θ[4]/180)*sin(π*θ[1]/180))*sin(π*θ[5]/180) - (-sin(π*(θ[2] + θ[3])/180)*sin(π*θ[1]/180))*cos(π*θ[5]/180))
az := (((-sin(π*(θ[2] + θ[3])/180)*cos(π*θ[4]/180))*sin(π*θ[5]/180)) - (-cos(1/180*π*(θ[2] + θ[3])))*cos(π*θ[5]/180))
px := (cos(π*θ[1]/180)*cos(π*θ[2]/180)*a[2] - sin(π*θ[1]/180)*d[2] + cos(π*(θ[2] + θ[3])/180)*cos(π*θ[1]/180)*a[3] + sin(π*(θ[2] + θ[3])/180)*cos(π*θ[1]/180)*d[4]) + ((cos(π*(θ[2] + θ[3])/180)*cos(π*θ[1]/180)*cos(π*θ[4]/180) - sin(π*θ[1]/180)*sin(π*θ[4]/180))*sin(π*θ[5]/180) - (-sin(π*(θ[2] + θ[3])/180)*cos(π*θ[1]/180))*cos(π*θ[5]/180))*d[6]
py := (cos(π*θ[1]/180)*d[2] + cos(π*θ[2]/180)*sin(π*θ[1]/180)*a[2] + cos(π*(θ[2] + θ[3])/180)*sin(π*θ[1]/180)*a[3] + sin(π*(θ[2] + θ[3])/180)*sin(π*θ[1]/180)*d[4]) + ((cos(π*θ[1]/180)*sin(π*θ[4]/180) + cos(π*(θ[2] + θ[3])/180)*cos(π*θ[4]/180)*sin(π*θ[1]/180))*sin(π*θ[5]/180) - (-sin(π*(θ[2] + θ[3])/180)*sin(π*θ[1]/180))*cos(π*θ[5]/180))*d[6]
pz := (cos(π*(θ[2] + θ[3])/180)*d[4] - sin(π*(θ[2] + θ[3])/180)*a[3] - sin(π*θ[2]/180)*(a[2] + d[1])) + (((-sin(π*(θ[2] + θ[3])/180)*cos(π*θ[4]/180))*sin(π*θ[5]/180)) - (-cos(1/180*π*(θ[2] + θ[3])))*cos(π*θ[5]/180))*d[6]
p4x := px - d[6]*ax
[nx, sx, ax, px; ny, sy, ay, py; nz, sz, az, pz; 0, 0, 0, 1] = [0, -1, 0, -150; 0.694658, 0, 0.71934, 22.4765; -0.71934, 0, 0.694658, -1.97143; 0, 0, 0, 1]
p4y := py - d[6]*ay
p4z := pz - d[6]*az
p4 := [p4x; p4y; p4z] = [-150; 18.8798; -5.44472]
[p4x; p4y; p4z] + [d[6]*ax; d[6]*ay; d[6]*az] = [-150; 22.4765; -1.97143]
or
p4x := cos(π*θ[1]/180)*cos(π*θ[2]/180)*a[2] - sin(π*θ[1]/180)*d[2] + cos(π*(θ[2] + θ[3])/180)*cos(π*θ[1]/180)*a[3] + sin(π*(θ[2] + θ[3])/180)*cos(π*θ[1]/180)*d[4]
p4y := cos(π*θ[1]/180)*d[2] + cos(π*θ[2]/180)*sin(π*θ[1]/180)*a[2] + cos(π*(θ[2] + θ[3])/180)*sin(π*θ[1]/180)*a[3] + sin(π*(θ[2] + θ[3])/180)*sin(π*θ[1]/180)*d[4]
p4z := cos(π*(θ[2] + θ[3])/180)*d[4] - sin(π*(θ[2] + θ[3])/180)*a[3] - sin(π*θ[2]/180)*a[2] + d[1]
p4 := [p4x; p4y; p4z] = [-150; 18.8798; 8.21213]
# Inverse algebraic kinematic solution
# indicator hand calculation:
-d[4]*sin(π*(θ[2] + θ[3])/180) - a[3]*cos(π*(θ[2] + θ[3])/180) - a[2]*cos(π*θ[2]/180) = -18.8798
sign_hand :=
    -1 if -d[4]*sin(π*(q[2] + q[3])/180) - a[3]*cos(π*(q[2] + θ[3])/180) - a[2]*cos(π*q[2]/180) < 0
    1 otherwise
sign_hand = -1
or
-p4y*sin(π*q[1]/180) - p4x*cos(π*q[1]/180) = -18.8798
sign_hand :=
    -1 if -p4y*sin(π*q[1]/180) - p4x*cos(π*q[1]/180) < 0
    1 otherwise
sign_hand = -1
1
θ1 := atan2(-sign_hand*p4x*sqrt(p4x^2 + p4y^2 - d[2]^2) + p4y*d[2], -sign_hand*p4y*sqrt(p4x^2 + p4y^2 - d[2]^2) - p4x*d[2])*180/π
θ1 = 90
# indicator elbow calculation: | wrong ind:
sign_hand*(sin(π*θ[3]/180)*a[3] - cos(π*θ[3]/180)*d[4]) = 13.5
sign_hand*(d[4]*cos(π*θ[3]/180) - a[3]*sin(π*θ[3]/180)) = -13.5
PZKsign_elbow :=
    -1 if sign_hand*(sin(π*θ[3]/180)*a[3] - cos(π*θ[3]/180)*d[4]) < 0
    1 otherwise  # in Puma 560 PZK different value
sign_elbow :=
    -1 if sign_hand*(d[4]*cos(π*θ[3]/180) - a[3]*sin(π*θ[3]/180)) < 0
    1 otherwise  # in FGL Puma 560 PZK
PZKsign_elbow = 1
sign_elbow = -1
2
sin_α_θ2 := -p4z/sqrt(p4x^2 + p4y^2 - d[2]^2 + p4z^2) = -0.398871
cos_α_θ2 := -sign_hand*sqrt(p4x^2 + p4y^2 - d[2]^2)/sqrt(p4x^2 + p4y^2 - d[2]^2 + p4z^2) = 0.917007
cos_β_θ2 := (a[2]^2 + p4x^2 + p4y^2 - d[2]^2 + p4z^2 - (a[3]^2 + d[4]^2))/(2*a[2]*sqrt(p4x^2 + p4y^2 - d[2]^2 + p4z^2)) = 0.795542
sin_β_θ2 := sqrt(1 - cos_β_θ2^2) = 0.605899
sin_θ2 := sin_α_θ2*cos_β_θ2 + (sign_elbow*sign_hand)*cos_α_θ2*sin_β_θ2 = 0.238295
cos_θ2 := cos_α_θ2*cos_β_θ2 - (sign_elbow*sign_hand)*sin_α_θ2*sin_β_θ2 = 0.971193
θ2 := atan2(cos_θ2, sin_θ2)*180/π
θ2 = 13.7859
3
sin_β_θ3 := |a[3]|/sqrt(a[3]^2 + d[4]^2) = 0.189117
cos_β_θ3 := d[4]/sqrt(a[3]^2 + d[4]^2) = 0.981955
z3 := [cos(π*θ[1]/180); sin(π*θ[1]/180); cos(π*(θ[2] + θ[3])/180)] = [0; 1; 0.707107]
z3 := [
    cos(π*θ[1]/180)*sin(π*(θ[2] + θ[3])/180);
    sin(π*θ[1]/180)*sin(π*(θ[2] + θ[3])/180);
    cos(π*(θ[2] + θ[3])/180)
] = [0; 0.707107; 0.707107]
cos_ϕ_θ3 := (a[2]^2 + a[3]^2 + d[4]^2 - (p4x^2 + p4y^2 + p4z^2 - d[2]^2))/(2*a[2]*sqrt(a[3]^2 + d[4]^2)) = -0.420347
sin_ϕ_θ3 := sign_hand*sign_elbow*sqrt(1 - cos_ϕ_θ3^2) = 0.907363
sin_θ3 := -sin_ϕ_θ3*cos_β_θ3 - cos_ϕ_θ3*sin_β_θ3 = -0.811495
cos_θ3 := -cos_ϕ_θ3*cos_β_θ3 + sin_ϕ_θ3*sin_β_θ3 = 0.58436
[
    az*sin(π*(θ[2] + θ[3])/180)*sin(π*θ[1]/180) - ay*cos(π*(θ[2] + θ[3])/180);
    ax*cos(π*(θ[2] + θ[3])/180) - az*sin(π*(θ[2] + θ[3])/180)*cos(π*θ[1]/180);
    ay*sin(π*(θ[2] + θ[3])/180)*cos(π*θ[1]/180) - ax*sin(π*(θ[2] + θ[3])/180)*sin(π*θ[1]/180)
] = [-0.0174524; 0; 0]
[
    az*sin(π*θ[1]/180) - ay*cos(π*(θ[2] + θ[3])/180);
    ax*cos(π*(θ[2] + θ[3])/180) - az*cos(π*θ[1]/180);
    ay*cos(π*θ[1]/180) - ax*sin(π*θ[1]/180)
] = [0.186008; 0; 0]
θ3 := atan2(cos_θ3, sin_θ3)*180/π
θ3 = -54.2422
# indicator wrist calculation:
z3 := [
    cos(π*θ[1]/180)*sin(π*(θ[2] + θ[3])/180);
    sin(π*θ[1]/180)*sin(π*(θ[2] + θ[3])/180);
    cos(π*(θ[2] + θ[3])/180)
] = [0; 0.707107; 0.707107]
vector_a := [ax; ay; az] = [0; 0.71934; 0.694658]
z3vector_a := z3×vector_a = [-0.0174524; 0; 0]
z3vector_a_norm := sqrt(z3vector_a[0]^2 + z3vector_a[1]^2 + z3vector_a[2]^2) = 0.0174524
z4[0] := z3vector_a[0]/z3vector_a_norm
# s scalar product y5 equals s scalar product z3×vector_a/z3×vector_a_norm
z4[1] := z3vector_a[1]/z3vector_a_norm  # n scalar product y5 equals s scalar product z3×vector_a/z3×vector_a_norm
z4[2] := z3vector_a[2]/z3vector_a_norm
z4p := [
    -cos(π*θ[4]/180)*sin(π*θ[1]/180) - cos(π*(θ[2] + θ[3])/180)*cos(π*θ[1]/180)*sin(π*θ[4]/180);
    cos(π*θ[1]/180)*cos(π*θ[4]/180) - cos(π*(θ[2] + θ[3])/180)*sin(π*θ[1]/180)*sin(π*θ[4]/180);
    sin(π*(θ[2] + θ[3])/180)*sin(π*θ[4]/180)
] = [-1; 0; 0]
z4 = [-1; 0; 0]
vector_s := [sx; sy; sz] = [-1; 0; 0]
vector_n := [nx; ny; nz] = [0; 0.694658; -0.71934]
VSZ := vector_s*z4 = 1
VNZ := vector_n*z4 = 6.77927e-32
wrist_s :=
    1 if (VSZ > 0)
    -1 otherwise
    = 1
wrist_n :=
    1 if (VSZ > 0)
    -1 otherwise
    = 1
wrist :=
    wrist_n if (VSZ == 0)
    wrist_s otherwise
    = 1
VSZp := vector_s*z4p = 1
VNZp := vector_n*z4p = 0
sign_s :=
    1 if (VSZp > 0)
    -1 otherwise
    = 1
sign_n :=
    1 if (VSZ > 0)
    -1 otherwise
    = 1
sign :=
    sign_n if (VSZ == 0)
    sign_s otherwise
    = 1
or_ind := sign*wrist = 1
4
sin_θ4 := or_ind*(-sin(π*θ[1]/180)*ax + cos(π*θ[1]/180)*ay)
cos_θ4 := or_ind*(cos(π*θ[1]/180)*cos(π*(θ[2] + θ[3])/180)*ax + sin(π*θ[1]/180)*cos(π*(θ[2] + θ[3])/180)*ay - sin(π*(θ[2] + θ[3])/180)*az)
θ4 := atan2(cos_θ4, sin_θ4)*180/π
θ4 = 0
5
sin_θ5 := (cos(π*θ[1]/180)*cos(π*θ[4]/180)*cos(π*(θ[2] + θ[3])/180) - sin(π*θ[1]/180)*sin(π*θ[4]/180))*ax + (cos(π*θ[1]/180)*sin(π*θ[4]/180) + cos(π*θ[4]/180)*sin(π*θ[1]/180)*cos(π*(θ[2] + θ[3])/180))*ay - cos(π*θ[4]/180)*sin(π*(θ[2] + θ[3])/180)*az = 0.0174524
cos_θ5 := (cos(π*θ[1]/180)*sin(π*(θ[2] + θ[3])/180)*ax + sin(π*θ[1]/180)*sin(π*(θ[2] + θ[3])/180)*ay) + cos(π*(θ[2] + θ[3])/180)*az = 0.999848
θ5 := atan2(cos_θ5, sin_θ5)*180/π
θ5 = 1
6
sin_θ6 := ((-cos(π*θ[1]/180)*sin(π*θ[4]/180)*cos(π*(θ[2] + θ[3])/180) - sin(π*θ[1]/180)*cos(π*θ[4]/180))*nx + (cos(π*θ[1]/180)*cos(π*θ[4]/180) - sin(π*θ[4]/180)*sin(π*θ[1]/180)*cos(π*(θ[2] + θ[3])/180))*ny) + sin(π*θ[4]/180)*sin(π*(θ[2] + θ[3])/180)*nz = 0
cos_θ6 := ((cos(π*(θ[2] + θ[3])/180)*cos(π*θ[1]/180)*cos(π*θ[4]/180) - sin(π*θ[1]/180)*sin(π*θ[4]/180))*cos(π*θ[5]/180) + (-sin(π*(θ[2] + θ[3])/180)*cos(π*θ[1]/180))*sin(π*θ[5]/180))*nx + ((cos(π*θ[1]/180)*sin(π*θ[4]/180) + cos(π*(θ[2] + θ[3])/180)*cos(π*θ[4]/180)*sin(π*θ[1]/180))*cos(π*θ[5]/180) + (-sin(π*(θ[2] + θ[3])/180)*sin(π*θ[1]/180))*sin(π*θ[5]/180))*ny + ((-sin(π*(θ[2] + θ[3])/180)*cos(π*θ[4]/180))*cos(π*θ[5]/180) + (-cos(1/180*π*(θ[2] + θ[3])))*sin(π*θ[5]/180))*nz = 1
θ6 := atan2(cos_θ6, sin_θ6)*180/π
θ6 = 0
θ1 = 90
q[1] = 90
θ2 = 13.7859
q[2] = 45
θ3 = -54.2422
q[3] = 0
θ4 = 0
q[4] = 0
θ5 = 1
q[5] = 1
θ6 = 0
q[6] = 0
